// SBML level 2 version 4
// command line:
// KaDE   syntax4.ka   -d   output   -l   1   -p   0.1    -ode-backend  SBML

model KaDe_output_()

  // Compartments:
  compartment default = 1 volume;

  // Species:
  species s1 in default = 20/default; s1 is "E(r[1]), R(e{u}[1],r[2]), R(e{u}[3],r[2]), E(r[3])";
  species E_r_default in default = 0; E_r_default is "E(r[.])";
  species R_e_u_r_default in default = 0; R_e_u_r_default is "R(e{u}[.],r[.])";
  species E_r_1_R_e_u_1_r in default = 0; E_r_1_R_e_u_1_r is "E(r[1]), R(e{u}[1],r[.])";
  species E_r_1_R_e_p_1_r in default = 0; E_r_1_R_e_p_1_r is "E(r[1]), R(e{p}[1],r[.])";
  species s6 in default = 0; s6 is "E(r[1]), R(e{u}[1],r[2]), R(e{p}[3],r[2]), E(r[3])";
  species s7 in default = 0; s7 is "E(r[1]), R(e{p}[1],r[2]), R(e{p}[3],r[2]), E(r[3])";
  species R_e_p_r in default = 0; R_e_p_r is "R(e{p}[.],r[.])";
  species E_r_1_R_e_p_r_2_R_e_p_1_r_2 in default = 0; E_r_1_R_e_p_r_2_R_e_p_1_r_2 is "E(r[1]), R(e{p}[.],r[2]), R(e{p}[1],r[2])";
  species E_r_1_R_e_u_r_2_R_e_p_1_r_2 in default = 0; E_r_1_R_e_u_r_2_R_e_p_1_r_2 is "E(r[1]), R(e{u}[.],r[2]), R(e{p}[1],r[2])";
  species E_r_1_R_e_p_r_2_R_e_u_1_r_2 in default = 0; E_r_1_R_e_p_r_2_R_e_u_1_r_2 is "E(r[1]), R(e{p}[.],r[2]), R(e{u}[1],r[2])";
  species R_e_p_r_1_R_e_p_r_1 in default = 0; R_e_p_r_1_R_e_p_r_1 is "R(e{p}[.],r[1]), R(e{p}[.],r[1])";
  species R_e_u_r_1_R_e_p_r_1 in default = 0; R_e_u_r_1_R_e_p_r_1 is "R(e{u}[.],r[1]), R(e{p}[.],r[1])";
  species R_e_u_r_1_R_e_u_r_1 in default = 0; R_e_u_r_1_R_e_u_r_1 is "R(e{u}[.],r[1]), R(e{u}[.],r[1])";
  species E_r_1_R_e_u_1_r_2_R_e_u_r_2 in default = 0; E_r_1_R_e_u_1_r_2_R_e_u_r_2 is "E(r[1]), R(e{u}[1],r[2]), R(e{u}[.],r[2])";

  // Parameters:
  tinit = 0 time;
  tend = 1 time;
  period = 0.1 time;
  k1 = 1;
  k2 = 1;
  k3 = 1;
  k4 = 1;
  k5 = 1;
  k6 = 1;
  k7 = 1;

  // Reactions:
  re1: 2 s1 => E_r_1_R_e_u_1_r_2_R_e_u_r_2; 1*(2*s1/2 + 2*s6/1 + 2*s7/2)*(s1/2); re1 is "E() -> .";  // modifiers: s6, s7
  re2: 2 s1 => E_r_1_R_e_u_1_r_2_R_e_u_r_2; 1*(2*s1/2 + 2*s6/1 + 2*s7/2)*(s1/2); re2 is "E() -> .";  // modifiers: s6, s7
  re3: 2 s1 => E_r_default + E_r_1_R_e_u_1_r; 1*(1*E_r_default/1 + 1*E_r_1_R_e_u_1_r/1 + 1*E_r_1_R_e_p_1_r/1 + 1*E_r_1_R_e_u_1_r_2_R_e_u_r_2/1 + 1*E_r_1_R_e_u_r_2_R_e_p_1_r_2/1 + 1*E_r_1_R_e_p_r_2_R_e_u_1_r_2/1 + 1*E_r_1_R_e_p_r_2_R_e_p_1_r_2/1 + 2*s1/2 + 2*s6/1 + 2*s7/2)*(s1/2); re3 is "R() -> .";  // modifiers: E_r_1_R_e_u_r_2_R_e_p_1_r_2, E_r_1_R_e_p_r_2_R_e_u_1_r_2, E_r_1_R_e_u_1_r_2_R_e_u_r_2, E_r_1_R_e_p_1_r, s6, s7, E_r_1_R_e_p_r_2_R_e_p_1_r_2
  re4: 2 s1 => 2 s1; k6*(s1/2); re4 is "R() -> R(e{u}[#])";
  re5: 2 s1 => s6; k2*(s1/2); re5 is "R(e{u}[1]), E(r[1]) -> R(e{p}[1]), E(r[1])";
  re6: 2 s1 => E_r_default + E_r_1_R_e_u_1_r; 1*(1*E_r_default/1 + 1*E_r_1_R_e_u_1_r/1 + 1*E_r_1_R_e_p_1_r/1 + 1*E_r_1_R_e_u_1_r_2_R_e_u_r_2/1 + 1*E_r_1_R_e_u_r_2_R_e_p_1_r_2/1 + 1*E_r_1_R_e_p_r_2_R_e_u_1_r_2/1 + 1*E_r_1_R_e_p_r_2_R_e_p_1_r_2/1 + 2*s1/2 + 2*s6/1 + 2*s7/2)*(s1/2); re6 is "R() -> .";  // modifiers: E_r_1_R_e_u_r_2_R_e_p_1_r_2, E_r_1_R_e_p_r_2_R_e_u_1_r_2, E_r_1_R_e_u_1_r_2_R_e_u_r_2, E_r_1_R_e_p_1_r, s6, s7, E_r_1_R_e_p_r_2_R_e_p_1_r_2
  re7: 2 s1 => 2 s1; k6*(s1/2); re7 is "R() -> R(e{u}[#])";
  re8: 2 s1 => s6; k2*(s1/2); re8 is "R(e{u}[1]), E(r[1]) -> R(e{p}[1]), E(r[1])";
  re9: s6 => E_r_1_R_e_p_r_2_R_e_u_1_r_2; 1*(2*s1/2 + 2*s6/1 + 2*s7/2)*s6; re9 is "E() -> .";  // modifiers: s1, s7
  re10: s6 => E_r_1_R_e_u_r_2_R_e_p_1_r_2; 1*(2*s1/2 + 2*s6/1 + 2*s7/2)*s6; re10 is "E() -> .";  // modifiers: s1, s7
  re11: s6 => E_r_default + E_r_1_R_e_u_1_r; 1*(1*E_r_default/1 + 1*E_r_1_R_e_u_1_r/1 + 1*E_r_1_R_e_p_1_r/1 + 1*E_r_1_R_e_u_1_r_2_R_e_u_r_2/1 + 1*E_r_1_R_e_u_r_2_R_e_p_1_r_2/1 + 1*E_r_1_R_e_p_r_2_R_e_u_1_r_2/1 + 1*E_r_1_R_e_p_r_2_R_e_p_1_r_2/1 + 2*s1/2 + 2*s6/1 + 2*s7/2)*s6; re11 is "R() -> .";  // modifiers: s1, E_r_1_R_e_u_r_2_R_e_p_1_r_2, E_r_1_R_e_p_r_2_R_e_u_1_r_2, E_r_1_R_e_u_1_r_2_R_e_u_r_2, E_r_1_R_e_p_1_r, s7, E_r_1_R_e_p_r_2_R_e_p_1_r_2
  re12: s6 => 2 s1; k6*s6; re12 is "R() -> R(e{u}[#])";
  re13: s6 => 2 s1; k7*s6; re13 is "R(e{p}[#]) -> R(e{u}[#])";
  re14: s6 => E_r_default + E_r_1_R_e_p_1_r; 1*(1*E_r_default/1 + 1*E_r_1_R_e_u_1_r/1 + 1*E_r_1_R_e_p_1_r/1 + 1*E_r_1_R_e_u_1_r_2_R_e_u_r_2/1 + 1*E_r_1_R_e_u_r_2_R_e_p_1_r_2/1 + 1*E_r_1_R_e_p_r_2_R_e_u_1_r_2/1 + 1*E_r_1_R_e_p_r_2_R_e_p_1_r_2/1 + 2*s1/2 + 2*s6/1 + 2*s7/2)*s6; re14 is "R() -> .";  // modifiers: s1, E_r_1_R_e_u_r_2_R_e_p_1_r_2, E_r_1_R_e_p_r_2_R_e_u_1_r_2, E_r_1_R_e_u_1_r_2_R_e_u_r_2, E_r_1_R_e_u_1_r, s7, E_r_1_R_e_p_r_2_R_e_p_1_r_2
  re15: s6 => s6; k6*s6; re15 is "R() -> R(e{u}[#])";
  re16: s6 => 2 s7; k2*s6; re16 is "R(e{u}[1]), E(r[1]) -> R(e{p}[1]), E(r[1])";
  re17: E_r_1_R_e_u_r_2_R_e_p_1_r_2 => R_e_u_r_1_R_e_p_r_1; 1*(2*s1/2 + 2*s6/1 + 2*s7/2)*E_r_1_R_e_u_r_2_R_e_p_1_r_2; re17 is "E() -> .";  // modifiers: s1, s6, s7
  re18: E_r_1_R_e_u_r_2_R_e_p_1_r_2 => E_r_default + R_e_u_r_default; 1*(1*E_r_default/1 + 1*E_r_1_R_e_u_1_r/1 + 1*E_r_1_R_e_p_1_r/1 + 1*E_r_1_R_e_u_1_r_2_R_e_u_r_2/1 + 1*E_r_1_R_e_u_r_2_R_e_p_1_r_2/1 + 1*E_r_1_R_e_p_r_2_R_e_u_1_r_2/1 + 1*E_r_1_R_e_p_r_2_R_e_p_1_r_2/1 + 2*s1/2 + 2*s6/1 + 2*s7/2)*E_r_1_R_e_u_r_2_R_e_p_1_r_2; re18 is "R() -> .";  // modifiers: s1, E_r_1_R_e_p_r_2_R_e_u_1_r_2, E_r_1_R_e_u_1_r_2_R_e_u_r_2, E_r_1_R_e_u_1_r, E_r_1_R_e_p_1_r, s6, s7, E_r_1_R_e_p_r_2_R_e_p_1_r_2
  re19: E_r_1_R_e_u_r_2_R_e_p_1_r_2 => E_r_1_R_e_u_1_r_2_R_e_u_r_2; k6*E_r_1_R_e_u_r_2_R_e_p_1_r_2; re19 is "R() -> R(e{u}[#])";
  re20: E_r_1_R_e_u_r_2_R_e_p_1_r_2 => E_r_1_R_e_u_1_r_2_R_e_u_r_2; k7*E_r_1_R_e_u_r_2_R_e_p_1_r_2; re20 is "R(e{p}[#]) -> R(e{u}[#])";
  re21: E_r_1_R_e_u_r_2_R_e_p_1_r_2 => E_r_1_R_e_p_1_r; 1*(1*E_r_default/1 + 1*E_r_1_R_e_u_1_r/1 + 1*E_r_1_R_e_p_1_r/1 + 1*E_r_1_R_e_u_1_r_2_R_e_u_r_2/1 + 1*E_r_1_R_e_u_r_2_R_e_p_1_r_2/1 + 1*E_r_1_R_e_p_r_2_R_e_u_1_r_2/1 + 1*E_r_1_R_e_p_r_2_R_e_p_1_r_2/1 + 2*s1/2 + 2*s6/1 + 2*s7/2)*E_r_1_R_e_u_r_2_R_e_p_1_r_2; re21 is "R() -> .";  // modifiers: s1, E_r_1_R_e_p_r_2_R_e_u_1_r_2, E_r_1_R_e_u_1_r_2_R_e_u_r_2, E_r_default, E_r_1_R_e_u_1_r, s6, s7, E_r_1_R_e_p_r_2_R_e_p_1_r_2
  re22: E_r_1_R_e_u_r_2_R_e_p_1_r_2 => E_r_1_R_e_u_r_2_R_e_p_1_r_2; k6*E_r_1_R_e_u_r_2_R_e_p_1_r_2; re22 is "R() -> R(e{u}[#])";
  re23: E_r_default + E_r_1_R_e_u_r_2_R_e_p_1_r_2 => s6; k1*E_r_default*E_r_1_R_e_u_r_2_R_e_p_1_r_2; re23 is "E(r[.]), R(e[.]) -> E(r[1]), R(e[1])";
  re24: E_r_1_R_e_p_r_2_R_e_u_1_r_2 => R_e_u_r_1_R_e_p_r_1; 1*(2*s1/2 + 2*s6/1 + 2*s7/2)*E_r_1_R_e_p_r_2_R_e_u_1_r_2; re24 is "E() -> .";  // modifiers: s1, s6, s7
  re25: E_r_1_R_e_p_r_2_R_e_u_1_r_2 => E_r_default + R_e_p_r; 1*(1*E_r_default/1 + 1*E_r_1_R_e_u_1_r/1 + 1*E_r_1_R_e_p_1_r/1 + 1*E_r_1_R_e_u_1_r_2_R_e_u_r_2/1 + 1*E_r_1_R_e_u_r_2_R_e_p_1_r_2/1 + 1*E_r_1_R_e_p_r_2_R_e_u_1_r_2/1 + 1*E_r_1_R_e_p_r_2_R_e_p_1_r_2/1 + 2*s1/2 + 2*s6/1 + 2*s7/2)*E_r_1_R_e_p_r_2_R_e_u_1_r_2; re25 is "R() -> .";  // modifiers: s1, E_r_1_R_e_u_r_2_R_e_p_1_r_2, E_r_1_R_e_u_1_r_2_R_e_u_r_2, E_r_1_R_e_u_1_r, E_r_1_R_e_p_1_r, s6, s7, E_r_1_R_e_p_r_2_R_e_p_1_r_2
  re26: E_r_1_R_e_p_r_2_R_e_u_1_r_2 => E_r_1_R_e_p_r_2_R_e_u_1_r_2; k6*E_r_1_R_e_p_r_2_R_e_u_1_r_2; re26 is "R() -> R(e{u}[#])";
  re27: E_r_1_R_e_p_r_2_R_e_u_1_r_2 => E_r_1_R_e_p_r_2_R_e_p_1_r_2; k2*E_r_1_R_e_p_r_2_R_e_u_1_r_2; re27 is "R(e{u}[1]), E(r[1]) -> R(e{p}[1]), E(r[1])";
  re28: E_r_1_R_e_p_r_2_R_e_u_1_r_2 => E_r_1_R_e_u_1_r; 1*(1*E_r_default/1 + 1*E_r_1_R_e_u_1_r/1 + 1*E_r_1_R_e_p_1_r/1 + 1*E_r_1_R_e_u_1_r_2_R_e_u_r_2/1 + 1*E_r_1_R_e_u_r_2_R_e_p_1_r_2/1 + 1*E_r_1_R_e_p_r_2_R_e_u_1_r_2/1 + 1*E_r_1_R_e_p_r_2_R_e_p_1_r_2/1 + 2*s1/2 + 2*s6/1 + 2*s7/2)*E_r_1_R_e_p_r_2_R_e_u_1_r_2; re28 is "R() -> .";  // modifiers: s1, E_r_1_R_e_u_r_2_R_e_p_1_r_2, E_r_1_R_e_u_1_r_2_R_e_u_r_2, E_r_default, E_r_1_R_e_p_1_r, s6, s7, E_r_1_R_e_p_r_2_R_e_p_1_r_2
  re29: E_r_1_R_e_p_r_2_R_e_u_1_r_2 => E_r_1_R_e_u_1_r_2_R_e_u_r_2; k6*E_r_1_R_e_p_r_2_R_e_u_1_r_2; re29 is "R() -> R(e{u}[#])";
  re30: E_r_1_R_e_p_r_2_R_e_u_1_r_2 => E_r_1_R_e_u_1_r_2_R_e_u_r_2; k7*E_r_1_R_e_p_r_2_R_e_u_1_r_2; re30 is "R(e{p}[#]) -> R(e{u}[#])";
  re31: E_r_default + E_r_1_R_e_p_r_2_R_e_u_1_r_2 => s6; k1*E_r_default*E_r_1_R_e_p_r_2_R_e_u_1_r_2; re31 is "E(r[.]), R(e[.]) -> E(r[1]), R(e[1])";
  re32: E_r_1_R_e_u_1_r_2_R_e_u_r_2 => 2 R_e_u_r_1_R_e_u_r_1; 1*(2*s1/2 + 2*s6/1 + 2*s7/2)*E_r_1_R_e_u_1_r_2_R_e_u_r_2; re32 is "E() -> .";  // modifiers: s1, s6, s7
  re33: E_r_1_R_e_u_1_r_2_R_e_u_r_2 => E_r_1_R_e_u_1_r; 1*(1*E_r_default/1 + 1*E_r_1_R_e_u_1_r/1 + 1*E_r_1_R_e_p_1_r/1 + 1*E_r_1_R_e_u_1_r_2_R_e_u_r_2/1 + 1*E_r_1_R_e_u_r_2_R_e_p_1_r_2/1 + 1*E_r_1_R_e_p_r_2_R_e_u_1_r_2/1 + 1*E_r_1_R_e_p_r_2_R_e_p_1_r_2/1 + 2*s1/2 + 2*s6/1 + 2*s7/2)*E_r_1_R_e_u_1_r_2_R_e_u_r_2; re33 is "R() -> .";  // modifiers: s1, E_r_1_R_e_u_r_2_R_e_p_1_r_2, E_r_1_R_e_p_r_2_R_e_u_1_r_2, E_r_default, E_r_1_R_e_p_1_r, s6, s7, E_r_1_R_e_p_r_2_R_e_p_1_r_2
  re34: E_r_1_R_e_u_1_r_2_R_e_u_r_2 => E_r_1_R_e_u_1_r_2_R_e_u_r_2; k6*E_r_1_R_e_u_1_r_2_R_e_u_r_2; re34 is "R() -> R(e{u}[#])";
  re35: E_r_default + E_r_1_R_e_u_1_r_2_R_e_u_r_2 => 2 s1; k1*E_r_default*E_r_1_R_e_u_1_r_2_R_e_u_r_2; re35 is "E(r[.]), R(e[.]) -> E(r[1]), R(e[1])";
  re36: E_r_1_R_e_u_1_r_2_R_e_u_r_2 => E_r_default + R_e_u_r_default; 1*(1*E_r_default/1 + 1*E_r_1_R_e_u_1_r/1 + 1*E_r_1_R_e_p_1_r/1 + 1*E_r_1_R_e_u_1_r_2_R_e_u_r_2/1 + 1*E_r_1_R_e_u_r_2_R_e_p_1_r_2/1 + 1*E_r_1_R_e_p_r_2_R_e_u_1_r_2/1 + 1*E_r_1_R_e_p_r_2_R_e_p_1_r_2/1 + 2*s1/2 + 2*s6/1 + 2*s7/2)*E_r_1_R_e_u_1_r_2_R_e_u_r_2; re36 is "R() -> .";  // modifiers: s1, E_r_1_R_e_u_r_2_R_e_p_1_r_2, E_r_1_R_e_p_r_2_R_e_u_1_r_2, E_r_1_R_e_u_1_r, E_r_1_R_e_p_1_r, s6, s7, E_r_1_R_e_p_r_2_R_e_p_1_r_2
  re37: E_r_1_R_e_u_1_r_2_R_e_u_r_2 => E_r_1_R_e_u_1_r_2_R_e_u_r_2; k6*E_r_1_R_e_u_1_r_2_R_e_u_r_2; re37 is "R() -> R(e{u}[#])";
  re38: E_r_1_R_e_u_1_r_2_R_e_u_r_2 => E_r_1_R_e_u_r_2_R_e_p_1_r_2; k2*E_r_1_R_e_u_1_r_2_R_e_u_r_2; re38 is "R(e{u}[1]), E(r[1]) -> R(e{p}[1]), E(r[1])";
  re39: 2 R_e_u_r_1_R_e_u_r_1 => R_e_u_r_default; 1*(1*E_r_default/1 + 1*E_r_1_R_e_u_1_r/1 + 1*E_r_1_R_e_p_1_r/1 + 1*E_r_1_R_e_u_1_r_2_R_e_u_r_2/1 + 1*E_r_1_R_e_u_r_2_R_e_p_1_r_2/1 + 1*E_r_1_R_e_p_r_2_R_e_u_1_r_2/1 + 1*E_r_1_R_e_p_r_2_R_e_p_1_r_2/1 + 2*s1/2 + 2*s6/1 + 2*s7/2)*(R_e_u_r_1_R_e_u_r_1/2); re39 is "R() -> .";  // modifiers: s1, E_r_1_R_e_u_r_2_R_e_p_1_r_2, E_r_1_R_e_p_r_2_R_e_u_1_r_2, E_r_1_R_e_u_1_r_2_R_e_u_r_2, E_r_default, E_r_1_R_e_u_1_r, E_r_1_R_e_p_1_r, s6, s7, E_r_1_R_e_p_r_2_R_e_p_1_r_2
  re40: 2 R_e_u_r_1_R_e_u_r_1 => 2 R_e_u_r_1_R_e_u_r_1; k6*(R_e_u_r_1_R_e_u_r_1/2); re40 is "R() -> R(e{u}[#])";
  re41: E_r_default + 2 R_e_u_r_1_R_e_u_r_1 => E_r_1_R_e_u_1_r_2_R_e_u_r_2; k1*E_r_default*(R_e_u_r_1_R_e_u_r_1/2); re41 is "E(r[.]), R(e[.]) -> E(r[1]), R(e[1])";
  re42: 2 R_e_u_r_1_R_e_u_r_1 => R_e_u_r_default; 1*(1*E_r_default/1 + 1*E_r_1_R_e_u_1_r/1 + 1*E_r_1_R_e_p_1_r/1 + 1*E_r_1_R_e_u_1_r_2_R_e_u_r_2/1 + 1*E_r_1_R_e_u_r_2_R_e_p_1_r_2/1 + 1*E_r_1_R_e_p_r_2_R_e_u_1_r_2/1 + 1*E_r_1_R_e_p_r_2_R_e_p_1_r_2/1 + 2*s1/2 + 2*s6/1 + 2*s7/2)*(R_e_u_r_1_R_e_u_r_1/2); re42 is "R() -> .";  // modifiers: s1, E_r_1_R_e_u_r_2_R_e_p_1_r_2, E_r_1_R_e_p_r_2_R_e_u_1_r_2, E_r_1_R_e_u_1_r_2_R_e_u_r_2, E_r_default, E_r_1_R_e_u_1_r, E_r_1_R_e_p_1_r, s6, s7, E_r_1_R_e_p_r_2_R_e_p_1_r_2
  re43: 2 R_e_u_r_1_R_e_u_r_1 => 2 R_e_u_r_1_R_e_u_r_1; k6*(R_e_u_r_1_R_e_u_r_1/2); re43 is "R() -> R(e{u}[#])";
  re44: E_r_default + 2 R_e_u_r_1_R_e_u_r_1 => E_r_1_R_e_u_1_r_2_R_e_u_r_2; k1*E_r_default*(R_e_u_r_1_R_e_u_r_1/2); re44 is "E(r[.]), R(e[.]) -> E(r[1]), R(e[1])";
  re45: R_e_u_r_1_R_e_p_r_1 => R_e_u_r_default; 1*(1*E_r_default/1 + 1*E_r_1_R_e_u_1_r/1 + 1*E_r_1_R_e_p_1_r/1 + 1*E_r_1_R_e_u_1_r_2_R_e_u_r_2/1 + 1*E_r_1_R_e_u_r_2_R_e_p_1_r_2/1 + 1*E_r_1_R_e_p_r_2_R_e_u_1_r_2/1 + 1*E_r_1_R_e_p_r_2_R_e_p_1_r_2/1 + 2*s1/2 + 2*s6/1 + 2*s7/2)*R_e_u_r_1_R_e_p_r_1; re45 is "R() -> .";  // modifiers: s1, E_r_1_R_e_u_r_2_R_e_p_1_r_2, E_r_1_R_e_p_r_2_R_e_u_1_r_2, E_r_1_R_e_u_1_r_2_R_e_u_r_2, E_r_default, E_r_1_R_e_u_1_r, E_r_1_R_e_p_1_r, s6, s7, E_r_1_R_e_p_r_2_R_e_p_1_r_2
  re46: R_e_u_r_1_R_e_p_r_1 => 2 R_e_u_r_1_R_e_u_r_1; k6*R_e_u_r_1_R_e_p_r_1; re46 is "R() -> R(e{u}[#])";
  re47: R_e_u_r_1_R_e_p_r_1 => 2 R_e_u_r_1_R_e_u_r_1; k7*R_e_u_r_1_R_e_p_r_1; re47 is "R(e{p}[#]) -> R(e{u}[#])";
  re48: E_r_default + R_e_u_r_1_R_e_p_r_1 => E_r_1_R_e_u_r_2_R_e_p_1_r_2; k1*E_r_default*R_e_u_r_1_R_e_p_r_1; re48 is "E(r[.]), R(e[.]) -> E(r[1]), R(e[1])";
  re49: R_e_u_r_1_R_e_p_r_1 => R_e_p_r; 1*(1*E_r_default/1 + 1*E_r_1_R_e_u_1_r/1 + 1*E_r_1_R_e_p_1_r/1 + 1*E_r_1_R_e_u_1_r_2_R_e_u_r_2/1 + 1*E_r_1_R_e_u_r_2_R_e_p_1_r_2/1 + 1*E_r_1_R_e_p_r_2_R_e_u_1_r_2/1 + 1*E_r_1_R_e_p_r_2_R_e_p_1_r_2/1 + 2*s1/2 + 2*s6/1 + 2*s7/2)*R_e_u_r_1_R_e_p_r_1; re49 is "R() -> .";  // modifiers: s1, E_r_1_R_e_u_r_2_R_e_p_1_r_2, E_r_1_R_e_p_r_2_R_e_u_1_r_2, E_r_1_R_e_u_1_r_2_R_e_u_r_2, E_r_default, E_r_1_R_e_u_1_r, E_r_1_R_e_p_1_r, s6, s7, E_r_1_R_e_p_r_2_R_e_p_1_r_2
  re50: R_e_u_r_1_R_e_p_r_1 => R_e_u_r_1_R_e_p_r_1; k6*R_e_u_r_1_R_e_p_r_1; re50 is "R() -> R(e{u}[#])";
  re51: E_r_default + R_e_u_r_1_R_e_p_r_1 => E_r_1_R_e_p_r_2_R_e_u_1_r_2; k1*E_r_default*R_e_u_r_1_R_e_p_r_1; re51 is "E(r[.]), R(e[.]) -> E(r[1]), R(e[1])";
  re52: 2 R_e_p_r_1_R_e_p_r_1 => R_e_p_r; 1*(1*E_r_default/1 + 1*E_r_1_R_e_u_1_r/1 + 1*E_r_1_R_e_p_1_r/1 + 1*E_r_1_R_e_u_1_r_2_R_e_u_r_2/1 + 1*E_r_1_R_e_u_r_2_R_e_p_1_r_2/1 + 1*E_r_1_R_e_p_r_2_R_e_u_1_r_2/1 + 1*E_r_1_R_e_p_r_2_R_e_p_1_r_2/1 + 2*s1/2 + 2*s6/1 + 2*s7/2)*(R_e_p_r_1_R_e_p_r_1/2); re52 is "R() -> .";  // modifiers: s1, E_r_1_R_e_u_r_2_R_e_p_1_r_2, E_r_1_R_e_p_r_2_R_e_u_1_r_2, E_r_1_R_e_u_1_r_2_R_e_u_r_2, E_r_default, E_r_1_R_e_u_1_r, E_r_1_R_e_p_1_r, s6, s7, E_r_1_R_e_p_r_2_R_e_p_1_r_2
  re53: 2 R_e_p_r_1_R_e_p_r_1 => R_e_u_r_1_R_e_p_r_1; k6*(R_e_p_r_1_R_e_p_r_1/2); re53 is "R() -> R(e{u}[#])";
  re54: 2 R_e_p_r_1_R_e_p_r_1 => R_e_u_r_1_R_e_p_r_1; k7*(R_e_p_r_1_R_e_p_r_1/2); re54 is "R(e{p}[#]) -> R(e{u}[#])";
  re55: E_r_default + 2 R_e_p_r_1_R_e_p_r_1 => E_r_1_R_e_p_r_2_R_e_p_1_r_2; k1*E_r_default*(R_e_p_r_1_R_e_p_r_1/2); re55 is "E(r[.]), R(e[.]) -> E(r[1]), R(e[1])";
  re56: 2 R_e_p_r_1_R_e_p_r_1 => R_e_p_r; 1*(1*E_r_default/1 + 1*E_r_1_R_e_u_1_r/1 + 1*E_r_1_R_e_p_1_r/1 + 1*E_r_1_R_e_u_1_r_2_R_e_u_r_2/1 + 1*E_r_1_R_e_u_r_2_R_e_p_1_r_2/1 + 1*E_r_1_R_e_p_r_2_R_e_u_1_r_2/1 + 1*E_r_1_R_e_p_r_2_R_e_p_1_r_2/1 + 2*s1/2 + 2*s6/1 + 2*s7/2)*(R_e_p_r_1_R_e_p_r_1/2); re56 is "R() -> .";  // modifiers: s1, E_r_1_R_e_u_r_2_R_e_p_1_r_2, E_r_1_R_e_p_r_2_R_e_u_1_r_2, E_r_1_R_e_u_1_r_2_R_e_u_r_2, E_r_default, E_r_1_R_e_u_1_r, E_r_1_R_e_p_1_r, s6, s7, E_r_1_R_e_p_r_2_R_e_p_1_r_2
  re57: 2 R_e_p_r_1_R_e_p_r_1 => R_e_u_r_1_R_e_p_r_1; k6*(R_e_p_r_1_R_e_p_r_1/2); re57 is "R() -> R(e{u}[#])";
  re58: 2 R_e_p_r_1_R_e_p_r_1 => R_e_u_r_1_R_e_p_r_1; k7*(R_e_p_r_1_R_e_p_r_1/2); re58 is "R(e{p}[#]) -> R(e{u}[#])";
  re59: E_r_default + 2 R_e_p_r_1_R_e_p_r_1 => E_r_1_R_e_p_r_2_R_e_p_1_r_2; k1*E_r_default*(R_e_p_r_1_R_e_p_r_1/2); re59 is "E(r[.]), R(e[.]) -> E(r[1]), R(e[1])";
  re60: E_r_1_R_e_p_r_2_R_e_p_1_r_2 => 2 R_e_p_r_1_R_e_p_r_1; 1*(2*s1/2 + 2*s6/1 + 2*s7/2)*E_r_1_R_e_p_r_2_R_e_p_1_r_2; re60 is "E() -> .";  // modifiers: s1, s6, s7
  re61: E_r_1_R_e_p_r_2_R_e_p_1_r_2 => E_r_default + R_e_p_r; 1*(1*E_r_default/1 + 1*E_r_1_R_e_u_1_r/1 + 1*E_r_1_R_e_p_1_r/1 + 1*E_r_1_R_e_u_1_r_2_R_e_u_r_2/1 + 1*E_r_1_R_e_u_r_2_R_e_p_1_r_2/1 + 1*E_r_1_R_e_p_r_2_R_e_u_1_r_2/1 + 1*E_r_1_R_e_p_r_2_R_e_p_1_r_2/1 + 2*s1/2 + 2*s6/1 + 2*s7/2)*E_r_1_R_e_p_r_2_R_e_p_1_r_2; re61 is "R() -> .";  // modifiers: s1, E_r_1_R_e_u_r_2_R_e_p_1_r_2, E_r_1_R_e_p_r_2_R_e_u_1_r_2, E_r_1_R_e_u_1_r_2_R_e_u_r_2, E_r_1_R_e_u_1_r, E_r_1_R_e_p_1_r, s6, s7
  re62: E_r_1_R_e_p_r_2_R_e_p_1_r_2 => E_r_1_R_e_p_r_2_R_e_u_1_r_2; k6*E_r_1_R_e_p_r_2_R_e_p_1_r_2; re62 is "R() -> R(e{u}[#])";
  re63: E_r_1_R_e_p_r_2_R_e_p_1_r_2 => E_r_1_R_e_p_r_2_R_e_u_1_r_2; k7*E_r_1_R_e_p_r_2_R_e_p_1_r_2; re63 is "R(e{p}[#]) -> R(e{u}[#])";
  re64: E_r_1_R_e_p_r_2_R_e_p_1_r_2 => E_r_1_R_e_p_1_r; 1*(1*E_r_default/1 + 1*E_r_1_R_e_u_1_r/1 + 1*E_r_1_R_e_p_1_r/1 + 1*E_r_1_R_e_u_1_r_2_R_e_u_r_2/1 + 1*E_r_1_R_e_u_r_2_R_e_p_1_r_2/1 + 1*E_r_1_R_e_p_r_2_R_e_u_1_r_2/1 + 1*E_r_1_R_e_p_r_2_R_e_p_1_r_2/1 + 2*s1/2 + 2*s6/1 + 2*s7/2)*E_r_1_R_e_p_r_2_R_e_p_1_r_2; re64 is "R() -> .";  // modifiers: s1, E_r_1_R_e_u_r_2_R_e_p_1_r_2, E_r_1_R_e_p_r_2_R_e_u_1_r_2, E_r_1_R_e_u_1_r_2_R_e_u_r_2, E_r_default, E_r_1_R_e_u_1_r, s6, s7
  re65: E_r_1_R_e_p_r_2_R_e_p_1_r_2 => E_r_1_R_e_u_r_2_R_e_p_1_r_2; k6*E_r_1_R_e_p_r_2_R_e_p_1_r_2; re65 is "R() -> R(e{u}[#])";
  re66: E_r_1_R_e_p_r_2_R_e_p_1_r_2 => E_r_1_R_e_u_r_2_R_e_p_1_r_2; k7*E_r_1_R_e_p_r_2_R_e_p_1_r_2; re66 is "R(e{p}[#]) -> R(e{u}[#])";
  re67: E_r_default + E_r_1_R_e_p_r_2_R_e_p_1_r_2 => 2 s7; k1*E_r_default*E_r_1_R_e_p_r_2_R_e_p_1_r_2; re67 is "E(r[.]), R(e[.]) -> E(r[1]), R(e[1])";
  re68: 2 s7 => E_r_1_R_e_p_r_2_R_e_p_1_r_2; 1*(2*s1/2 + 2*s6/1 + 2*s7/2)*(s7/2); re68 is "E() -> .";  // modifiers: s1, s6
  re69: 2 s7 => E_r_1_R_e_p_r_2_R_e_p_1_r_2; 1*(2*s1/2 + 2*s6/1 + 2*s7/2)*(s7/2); re69 is "E() -> .";  // modifiers: s1, s6
  re70: 2 s7 => E_r_default + E_r_1_R_e_p_1_r; 1*(1*E_r_default/1 + 1*E_r_1_R_e_u_1_r/1 + 1*E_r_1_R_e_p_1_r/1 + 1*E_r_1_R_e_u_1_r_2_R_e_u_r_2/1 + 1*E_r_1_R_e_u_r_2_R_e_p_1_r_2/1 + 1*E_r_1_R_e_p_r_2_R_e_u_1_r_2/1 + 1*E_r_1_R_e_p_r_2_R_e_p_1_r_2/1 + 2*s1/2 + 2*s6/1 + 2*s7/2)*(s7/2); re70 is "R() -> .";  // modifiers: s1, E_r_1_R_e_u_r_2_R_e_p_1_r_2, E_r_1_R_e_p_r_2_R_e_u_1_r_2, E_r_1_R_e_u_1_r_2_R_e_u_r_2, E_r_1_R_e_u_1_r, s6, E_r_1_R_e_p_r_2_R_e_p_1_r_2
  re71: 2 s7 => s6; k6*(s7/2); re71 is "R() -> R(e{u}[#])";
  re72: 2 s7 => s6; k7*(s7/2); re72 is "R(e{p}[#]) -> R(e{u}[#])";
  re73: 2 s7 => E_r_default + E_r_1_R_e_p_1_r; 1*(1*E_r_default/1 + 1*E_r_1_R_e_u_1_r/1 + 1*E_r_1_R_e_p_1_r/1 + 1*E_r_1_R_e_u_1_r_2_R_e_u_r_2/1 + 1*E_r_1_R_e_u_r_2_R_e_p_1_r_2/1 + 1*E_r_1_R_e_p_r_2_R_e_u_1_r_2/1 + 1*E_r_1_R_e_p_r_2_R_e_p_1_r_2/1 + 2*s1/2 + 2*s6/1 + 2*s7/2)*(s7/2); re73 is "R() -> .";  // modifiers: s1, E_r_1_R_e_u_r_2_R_e_p_1_r_2, E_r_1_R_e_p_r_2_R_e_u_1_r_2, E_r_1_R_e_u_1_r_2_R_e_u_r_2, E_r_1_R_e_u_1_r, s6, E_r_1_R_e_p_r_2_R_e_p_1_r_2
  re74: 2 s7 => s6; k6*(s7/2); re74 is "R() -> R(e{u}[#])";
  re75: 2 s7 => s6; k7*(s7/2); re75 is "R(e{p}[#]) -> R(e{u}[#])";
  re76: R_e_p_r => ; 1*(1*E_r_default/1 + 1*E_r_1_R_e_u_1_r/1 + 1*E_r_1_R_e_p_1_r/1 + 1*E_r_1_R_e_u_1_r_2_R_e_u_r_2/1 + 1*E_r_1_R_e_u_r_2_R_e_p_1_r_2/1 + 1*E_r_1_R_e_p_r_2_R_e_u_1_r_2/1 + 1*E_r_1_R_e_p_r_2_R_e_p_1_r_2/1 + 2*s1/2 + 2*s6/1 + 2*s7/2)*R_e_p_r; re76 is "R() -> .";  // modifiers: s1, E_r_1_R_e_u_r_2_R_e_p_1_r_2, E_r_1_R_e_p_r_2_R_e_u_1_r_2, E_r_1_R_e_u_1_r_2_R_e_u_r_2, E_r_default, E_r_1_R_e_u_1_r, E_r_1_R_e_p_1_r, s6, s7, E_r_1_R_e_p_r_2_R_e_p_1_r_2
  re77: R_e_p_r => R_e_u_r_default; k6*R_e_p_r; re77 is "R() -> R(e{u}[#])";
  re78: R_e_p_r => R_e_u_r_default; k7*R_e_p_r; re78 is "R(e{p}[#]) -> R(e{u}[#])";
  re79: E_r_default + R_e_p_r => E_r_1_R_e_p_1_r; k1*E_r_default*R_e_p_r; re79 is "E(r[.]), R(e[.]) -> E(r[1]), R(e[1])";
  re80: E_r_1_R_e_p_1_r => R_e_p_r; 1*(2*s1/2 + 2*s6/1 + 2*s7/2)*E_r_1_R_e_p_1_r; re80 is "E() -> .";  // modifiers: s1, s6, s7
  re81: E_r_1_R_e_p_1_r => E_r_default; 1*(1*E_r_default/1 + 1*E_r_1_R_e_u_1_r/1 + 1*E_r_1_R_e_p_1_r/1 + 1*E_r_1_R_e_u_1_r_2_R_e_u_r_2/1 + 1*E_r_1_R_e_u_r_2_R_e_p_1_r_2/1 + 1*E_r_1_R_e_p_r_2_R_e_u_1_r_2/1 + 1*E_r_1_R_e_p_r_2_R_e_p_1_r_2/1 + 2*s1/2 + 2*s6/1 + 2*s7/2)*E_r_1_R_e_p_1_r; re81 is "R() -> .";  // modifiers: s1, E_r_1_R_e_u_r_2_R_e_p_1_r_2, E_r_1_R_e_p_r_2_R_e_u_1_r_2, E_r_1_R_e_u_1_r_2_R_e_u_r_2, E_r_1_R_e_u_1_r, s6, s7, E_r_1_R_e_p_r_2_R_e_p_1_r_2
  re82: E_r_1_R_e_p_1_r => E_r_1_R_e_u_1_r; k6*E_r_1_R_e_p_1_r; re82 is "R() -> R(e{u}[#])";
  re83: E_r_1_R_e_p_1_r => E_r_1_R_e_u_1_r; k7*E_r_1_R_e_p_1_r; re83 is "R(e{p}[#]) -> R(e{u}[#])";
  re84: 2 E_r_1_R_e_p_1_r => 2 s7; 2*k5*E_r_1_R_e_p_1_r*E_r_1_R_e_p_1_r; re84 is "R(e[_],r[.]), R(e[r.E],r[.]) -> R(e[_],r[1]), R(e[r.E],r[1])";
  re85: E_r_1_R_e_u_1_r + E_r_1_R_e_p_1_r => s6; k5*E_r_1_R_e_u_1_r*E_r_1_R_e_p_1_r; re85 is "R(e[_],r[.]), R(e[r.E],r[.]) -> R(e[_],r[1]), R(e[r.E],r[1])";
  re86: E_r_1_R_e_u_1_r + E_r_1_R_e_p_1_r => s6; k5*E_r_1_R_e_p_1_r*E_r_1_R_e_u_1_r; re86 is "R(e[_],r[.]), R(e[r.E],r[.]) -> R(e[_],r[1]), R(e[r.E],r[1])";
  re87: E_r_1_R_e_u_1_r => R_e_u_r_default; 1*(2*s1/2 + 2*s6/1 + 2*s7/2)*E_r_1_R_e_u_1_r; re87 is "E() -> .";  // modifiers: s1, s6, s7
  re88: E_r_1_R_e_u_1_r => E_r_default; 1*(1*E_r_default/1 + 1*E_r_1_R_e_u_1_r/1 + 1*E_r_1_R_e_p_1_r/1 + 1*E_r_1_R_e_u_1_r_2_R_e_u_r_2/1 + 1*E_r_1_R_e_u_r_2_R_e_p_1_r_2/1 + 1*E_r_1_R_e_p_r_2_R_e_u_1_r_2/1 + 1*E_r_1_R_e_p_r_2_R_e_p_1_r_2/1 + 2*s1/2 + 2*s6/1 + 2*s7/2)*E_r_1_R_e_u_1_r; re88 is "R() -> .";  // modifiers: s1, E_r_1_R_e_u_r_2_R_e_p_1_r_2, E_r_1_R_e_p_r_2_R_e_u_1_r_2, E_r_1_R_e_u_1_r_2_R_e_u_r_2, E_r_1_R_e_p_1_r, s6, s7, E_r_1_R_e_p_r_2_R_e_p_1_r_2
  re89: E_r_1_R_e_u_1_r => E_r_1_R_e_u_1_r; k6*E_r_1_R_e_u_1_r; re89 is "R() -> R(e{u}[#])";
  re90: E_r_1_R_e_u_1_r => E_r_1_R_e_p_1_r; k2*E_r_1_R_e_u_1_r; re90 is "R(e{u}[1]), E(r[1]) -> R(e{p}[1]), E(r[1])";
  re91: 2 E_r_1_R_e_u_1_r => 2 s1; 2*k5*E_r_1_R_e_u_1_r*E_r_1_R_e_u_1_r; re91 is "R(e[_],r[.]), R(e[r.E],r[.]) -> R(e[_],r[1]), R(e[r.E],r[1])";
  re92: E_r_default => ; 1*(2*s1/2 + 2*s6/1 + 2*s7/2)*E_r_default; re92 is "E() -> .";  // modifiers: s1, s6, s7
  re93: E_r_default + R_e_u_r_default => E_r_1_R_e_u_1_r; k1*E_r_default*R_e_u_r_default; re93 is "E(r[.]), R(e[.]) -> E(r[1]), R(e[1])";
  re94: R_e_u_r_default => ; 1*(1*E_r_default/1 + 1*E_r_1_R_e_u_1_r/1 + 1*E_r_1_R_e_p_1_r/1 + 1*E_r_1_R_e_u_1_r_2_R_e_u_r_2/1 + 1*E_r_1_R_e_u_r_2_R_e_p_1_r_2/1 + 1*E_r_1_R_e_p_r_2_R_e_u_1_r_2/1 + 1*E_r_1_R_e_p_r_2_R_e_p_1_r_2/1 + 2*s1/2 + 2*s6/1 + 2*s7/2)*R_e_u_r_default; re94 is "R() -> .";  // modifiers: s1, E_r_1_R_e_u_r_2_R_e_p_1_r_2, E_r_1_R_e_p_r_2_R_e_u_1_r_2, E_r_1_R_e_u_1_r_2_R_e_u_r_2, E_r_default, E_r_1_R_e_u_1_r, E_r_1_R_e_p_1_r, s6, s7, E_r_1_R_e_p_r_2_R_e_p_1_r_2
  re95: R_e_u_r_default => R_e_u_r_default; k6*R_e_u_r_default; re95 is "R() -> R(e{u}[#])";
  R_e_u_r: => R_e_u_r_default; k4; R_e_u_r is ". -> R(e{u}[.],r[.])";
  E_r: => E_r_default; k3; E_r is ". -> E(r[.])";

  // Unit definitions:
  unit substance = mole;
  unit volume = litre;
end
